<neuroml xmlns="http://www.neuroml.org/schema/neuroml2"  xmlns:xs="http://www.w3.org/2001/XMLSchema" xmlns:xsi="http://www.w3.org/2001/XMLSchema-instance" xsi:schemaLocation="http://www.neuroml.org/schema/neuroml2 https://raw.github.com/NeuroML/NeuroML2/development/Schemas/NeuroML2/NeuroML_v2.1.xsd" id="NeuroML2_file_exported_from_NEURON">
    <include href="pas.channel.nml"/>
    <include href="NaV.channel.nml"/>
    <include href="K_T.channel.nml"/>
    <include href="Kd.channel.nml"/>
    <include href="Kv2like.channel.nml"/>
    <include href="Kv3_1.channel.nml"/>
    <include href="SK.channel.nml"/>
    <include href="Ih.channel.nml"/>
    <include href="Im_v2.channel.nml"/>
    <include href="Ca_HVA.channel.nml"/>
    <include href="Ca_LVA.channel.nml"/>
    <include href="CaDynamics_all.nml"/>
    <cell id="Cell_496490646">
        <notes>

Export of a cell model (496490646) obtained from the Allen Institute Cell Types Database into NeuroML2

Electrophysiology on which this model is based: http://celltypes.brain-map.org/mouse/experiment/electrophysiology/486502127

******************************************************
*  This export to NeuroML2 has not yet been fully validated!!
*  Use with caution!!
******************************************************

        </notes>
        <morphology id="morphology">
            <segment id="0" name="Seg0_soma_0">
                <proximal x="2.868430e+02" y="5.972310e+02" z="1.919740e+01" diameter="12.2456"/>
                <distal x="2.929660e+02" y="5.972310e+02" z="1.919740e+01" diameter="12.2456"/>
            </segment>
            <segment id="2" name="Seg1_soma_0">
                <parent segment="0"/>
                <distal x="2.990890e+02" y="5.972310e+02" z="1.919740e+01" diameter="12.2456"/>
            </segment>
            <segment id="1927" name="Seg0_axon_0">
                <parent segment="0"/>
                <proximal x="2.929660e+02" y="5.972310e+02" z="1.919740e+01" diameter="1.0"/>
                <distal x="2.988070e+02" y="6.110470e+02" z="1.919740e+01" diameter="1.0"/>
            </segment>
            <segment id="1928" name="Seg1_axon_0">
                <parent segment="1927"/>
                <distal x="3.046480e+02" y="6.248630e+02" z="1.919740e+01" diameter="1.0"/>
            </segment>
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            <segmentGroup neuroLexId="sao864921383" id="soma_0">
                <notes>This group contains an unbranched set of segments, and all of the segmentGroups marked with
             neuroLexId = sao864921383 form a non-overlapping set of all of the segments.
             These segmentGroups correspond to the 'cables' of NeuroML v1.8.1, and map to/from NEURON sections.</notes>
                <member segment="0"/>
                <member segment="2"/>
            </segmentGroup>
            <segmentGroup neuroLexId="sao864921383" id="axon_0">
                <notes>This group contains an unbranched set of segments, and all of the segmentGroups marked with
             neuroLexId = sao864921383 form a non-overlapping set of all of the segments.
             These segmentGroups correspond to the 'cables' of NeuroML v1.8.1, and map to/from NEURON sections.</notes>
                <member segment="1927"/>
                <member segment="1928"/>
            </segmentGroup>
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            <segmentGroup id="axon">
                <include segmentGroup="axon_0"/>
                <include segmentGroup="axon_1"/>
            </segmentGroup>
            <segmentGroup id="apic">
                <include segmentGroup="apic_0"/>
                <include segmentGroup="apic_18"/>
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            </segmentGroup>
            <segmentGroup id="dend">
                <include segmentGroup="dend_16"/>
                <include segmentGroup="dend_15"/>
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            </segmentGroup>
            <segmentGroup id="OneSecGrp_SectionRef_40241">
                <include segmentGroup="soma_0"/>
            </segmentGroup>
            <segmentGroup id="soma_group">
                <include segmentGroup="soma"/>
            </segmentGroup>
            <segmentGroup id="axon_group">
                <include segmentGroup="axon"/>
            </segmentGroup>
            <segmentGroup id="dendrite_group">
                <include segmentGroup="dend"/>
            </segmentGroup>
        </morphology>
        <biophysicalProperties id="biophys">
            <membraneProperties>
                <channelDensity id="pas_soma" ionChannel="pas" condDensity="2.73705e-05 S_per_cm2" erev="-60.1768 mV" segmentGroup="soma" ion="non_specific"/>
                <channelDensity id="pas_axon" ionChannel="pas" condDensity="4.67892e-05 S_per_cm2" erev="-61.039 mV" segmentGroup="axon" ion="non_specific"/>
                <channelDensity id="pas_apic" ionChannel="pas" condDensity="3.66619e-05 S_per_cm2" erev="-60.026 mV" segmentGroup="apic" ion="non_specific"/>
                <channelDensity id="pas_dend" ionChannel="pas" condDensity="3.22493e-05 S_per_cm2" erev="-84.7861 mV" segmentGroup="dend" ion="non_specific"/>
                <channelDensity id="NaV_axon" ionChannel="NaV" condDensity="0.0241868 S_per_cm2" erev="53.0 mV" segmentGroup="axon" ion="na"/>
                <channelDensity id="K_T_axon" ionChannel="K_T" condDensity="0.000673384 S_per_cm2" erev="-107.0 mV" segmentGroup="axon" ion="k"/>
                <channelDensity id="Kd_axon" ionChannel="Kd" condDensity="0.00250882 S_per_cm2" erev="-107.0 mV" segmentGroup="axon" ion="k"/>
                <channelDensity id="Kv2like_axon" ionChannel="Kv2like" condDensity="0.0510983 S_per_cm2" erev="-107.0 mV" segmentGroup="axon" ion="k"/>
                <channelDensity id="Kv3_1_axon" ionChannel="Kv3_1" condDensity="0.982651 S_per_cm2" erev="-107.0 mV" segmentGroup="axon" ion="k"/>
                <channelDensity id="SK_axon" ionChannel="SK" condDensity="0.0098819 S_per_cm2" erev="-107.0 mV" segmentGroup="axon" ion="k"/>
                <channelDensity id="NaV_soma" ionChannel="NaV" condDensity="0.0435987 S_per_cm2" erev="53.0 mV" segmentGroup="soma" ion="na"/>
                <channelDensity id="SK_soma" ionChannel="SK" condDensity="0.000248163 S_per_cm2" erev="-107.0 mV" segmentGroup="soma" ion="k"/>
                <channelDensity id="Kv3_1_soma" ionChannel="Kv3_1" condDensity="0.00518731 S_per_cm2" erev="-107.0 mV" segmentGroup="soma" ion="k"/>
                <channelDensity id="Ih_soma" ionChannel="Ih" condDensity="8.40535e-07 S_per_cm2" erev="-45 mV" segmentGroup="soma" ion="hcn"/>
                <channelDensity id="NaV_apic" ionChannel="NaV" condDensity="0.0486985 S_per_cm2" erev="53.0 mV" segmentGroup="apic" ion="na"/>
                <channelDensity id="Kv3_1_apic" ionChannel="Kv3_1" condDensity="0.995905 S_per_cm2" erev="-107.0 mV" segmentGroup="apic" ion="k"/>
                <channelDensity id="Im_v2_apic" ionChannel="Im_v2" condDensity="0.00945767 S_per_cm2" erev="-107.0 mV" segmentGroup="apic" ion="k"/>
                <channelDensity id="Ih_apic" ionChannel="Ih" condDensity="9.61288e-06 S_per_cm2" erev="-45 mV" segmentGroup="apic" ion="hcn"/>
                <channelDensity id="NaV_dend" ionChannel="NaV" condDensity="0.0317674 S_per_cm2" erev="53.0 mV" segmentGroup="dend" ion="na"/>
                <channelDensity id="Kv3_1_dend" ionChannel="Kv3_1" condDensity="5.14326e-05 S_per_cm2" erev="-107.0 mV" segmentGroup="dend" ion="k"/>
                <channelDensity id="Im_v2_dend" ionChannel="Im_v2" condDensity="0.00103031 S_per_cm2" erev="-107.0 mV" segmentGroup="dend" ion="k"/>
                <channelDensity id="Ih_dend" ionChannel="Ih" condDensity="5.79573e-06 S_per_cm2" erev="-45 mV" segmentGroup="dend" ion="hcn"/>
                <channelDensityNernst id="Ca_HVA_axon" ionChannel="Ca_HVA" condDensity="8.40099e-06 S_per_cm2" segmentGroup="axon" ion="ca"/>
                <channelDensityNernst id="Ca_LVA_axon" ionChannel="Ca_LVA" condDensity="0.00264354 S_per_cm2" segmentGroup="axon" ion="ca"/>
                <channelDensityNernst id="Ca_HVA_soma" ionChannel="Ca_HVA" condDensity="5.58484e-06 S_per_cm2" segmentGroup="soma" ion="ca"/>
                <channelDensityNernst id="Ca_LVA_soma" ionChannel="Ca_LVA" condDensity="0.00585587 S_per_cm2" segmentGroup="soma" ion="ca"/>
                <specificCapacitance value="2.07316 uF_per_cm2" segmentGroup="soma"/>
                <specificCapacitance value="6.69001 uF_per_cm2" segmentGroup="axon"/>
                <specificCapacitance value="0.643194 uF_per_cm2" segmentGroup="apic"/>
                <specificCapacitance value="3.12717 uF_per_cm2" segmentGroup="dend"/>
            </membraneProperties>
            <intracellularProperties>
                <species segmentGroup="soma" id="ca" concentrationModel="CaDynamics_496490646_axon" ion="ca" initialConcentration="0.0001 mM" initialExtConcentration="2 mM"/>
                <species segmentGroup="soma" id="ca" concentrationModel="CaDynamics_496490646_soma" ion="ca" initialConcentration="0.0001 mM" initialExtConcentration="2 mM"/>
                <resistivity value="50.3383 ohm_cm" segmentGroup="soma"/>
                <resistivity value="74.0352 ohm_cm" segmentGroup="axon"/>
                <resistivity value="98.9118 ohm_cm" segmentGroup="apic"/>
                <resistivity value="137.026 ohm_cm" segmentGroup="dend"/>
            </intracellularProperties>
        </biophysicalProperties>
    </cell>
</neuroml>
