<neuroml xmlns="http://www.neuroml.org/schema/neuroml2"  xmlns:xs="http://www.w3.org/2001/XMLSchema" xmlns:xsi="http://www.w3.org/2001/XMLSchema-instance" xsi:schemaLocation="http://www.neuroml.org/schema/neuroml2 https://raw.github.com/NeuroML/NeuroML2/development/Schemas/NeuroML2/NeuroML_v2.1.xsd" id="NeuroML2_file_exported_from_NEURON">
    <include href="pas.channel.nml"/>
    <include href="NaV.channel.nml"/>
    <include href="K_T.channel.nml"/>
    <include href="Kd.channel.nml"/>
    <include href="Kv2like.channel.nml"/>
    <include href="Kv3_1.channel.nml"/>
    <include href="SK.channel.nml"/>
    <include href="Ih.channel.nml"/>
    <include href="Im_v2.channel.nml"/>
    <include href="Ca_HVA.channel.nml"/>
    <include href="Ca_LVA.channel.nml"/>
    <include href="CaDynamics_all.nml"/>
    <cell id="Cell_496538944">
        <notes>

Export of a cell model (496538944) obtained from the Allen Institute Cell Types Database into NeuroML2

Electrophysiology on which this model is based: http://celltypes.brain-map.org/mouse/experiment/electrophysiology/485058595

******************************************************
*  This export to NeuroML2 has not yet been fully validated!!
*  Use with caution!!
******************************************************

        </notes>
        <morphology id="morphology">
            <segment id="0" name="Seg0_soma_0">
                <proximal x="2.732870e+02" y="6.523090e+02" z="7.896000e+01" diameter="10.5548"/>
                <distal x="2.785640e+02" y="6.523090e+02" z="7.896000e+01" diameter="10.5548"/>
            </segment>
            <segment id="2" name="Seg1_soma_0">
                <parent segment="0"/>
                <distal x="2.838410e+02" y="6.523090e+02" z="7.896000e+01" diameter="10.5548"/>
            </segment>
            <segment id="949" name="Seg0_axon_0">
                <parent segment="0"/>
                <proximal x="2.785640e+02" y="6.523090e+02" z="7.896000e+01" diameter="1.0"/>
                <distal x="2.844050e+02" y="6.661250e+02" z="7.896000e+01" diameter="1.0"/>
            </segment>
            <segment id="950" name="Seg1_axon_0">
                <parent segment="949"/>
                <distal x="2.902470e+02" y="6.799410e+02" z="7.896000e+01" diameter="1.0"/>
            </segment>
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            <segmentGroup neuroLexId="sao864921383" id="soma_0">
                <notes>This group contains an unbranched set of segments, and all of the segmentGroups marked with
             neuroLexId = sao864921383 form a non-overlapping set of all of the segments.
             These segmentGroups correspond to the 'cables' of NeuroML v1.8.1, and map to/from NEURON sections.</notes>
                <member segment="0"/>
                <member segment="2"/>
            </segmentGroup>
            <segmentGroup neuroLexId="sao864921383" id="axon_0">
                <notes>This group contains an unbranched set of segments, and all of the segmentGroups marked with
             neuroLexId = sao864921383 form a non-overlapping set of all of the segments.
             These segmentGroups correspond to the 'cables' of NeuroML v1.8.1, and map to/from NEURON sections.</notes>
                <member segment="949"/>
                <member segment="950"/>
            </segmentGroup>
            <segmentGroup neuroLexId="sao864921383" id="dend_18">
                <notes>This group contains an unbranched set of segments, and all of the segmentGroups marked with
             neuroLexId = sao864921383 form a non-overlapping set of all of the segments.
             These segmentGroups correspond to the 'cables' of NeuroML v1.8.1, and map to/from NEURON sections.</notes>
                <property tag="numberInternalDivisions" value="3"/>
                <member segment="898"/>
                <member segment="899"/>
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            </segmentGroup>
            <segmentGroup neuroLexId="sao864921383" id="dend_15">
                <notes>This group contains an unbranched set of segments, and all of the segmentGroups marked with
             neuroLexId = sao864921383 form a non-overlapping set of all of the segments.
             These segmentGroups correspond to the 'cables' of NeuroML v1.8.1, and map to/from NEURON sections.</notes>
                <property tag="numberInternalDivisions" value="3"/>
                <member segment="668"/>
                <member segment="669"/>
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            </segmentGroup>
            <segmentGroup neuroLexId="sao864921383" id="dend_12">
                <notes>This group contains an unbranched set of segments, and all of the segmentGroups marked with
             neuroLexId = sao864921383 form a non-overlapping set of all of the segments.
             These segmentGroups correspond to the 'cables' of NeuroML v1.8.1, and map to/from NEURON sections.</notes>
                <member segment="617"/>
                <member segment="618"/>
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            </segmentGroup>
            <segmentGroup neuroLexId="sao864921383" id="dend_6">
                <notes>This group contains an unbranched set of segments, and all of the segmentGroups marked with
             neuroLexId = sao864921383 form a non-overlapping set of all of the segments.
             These segmentGroups correspond to the 'cables' of NeuroML v1.8.1, and map to/from NEURON sections.</notes>
                <member segment="315"/>
                <member segment="316"/>
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            </segmentGroup>
            <segmentGroup neuroLexId="sao864921383" id="dend_5">
                <notes>This group contains an unbranched set of segments, and all of the segmentGroups marked with
             neuroLexId = sao864921383 form a non-overlapping set of all of the segments.
             These segmentGroups correspond to the 'cables' of NeuroML v1.8.1, and map to/from NEURON sections.</notes>
                <property tag="numberInternalDivisions" value="3"/>
                <member segment="279"/>
                <member segment="280"/>
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            </segmentGroup>
            <segmentGroup neuroLexId="sao864921383" id="dend_0">
                <notes>This group contains an unbranched set of segments, and all of the segmentGroups marked with
             neuroLexId = sao864921383 form a non-overlapping set of all of the segments.
             These segmentGroups correspond to the 'cables' of NeuroML v1.8.1, and map to/from NEURON sections.</notes>
                <member segment="3"/>
                <member segment="4"/>
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            </segmentGroup>
            <segmentGroup neuroLexId="sao864921383" id="axon_1">
                <notes>This group contains an unbranched set of segments, and all of the segmentGroups marked with
             neuroLexId = sao864921383 form a non-overlapping set of all of the segments.
             These segmentGroups correspond to the 'cables' of NeuroML v1.8.1, and map to/from NEURON sections.</notes>
                <member segment="951"/>
                <member segment="952"/>
            </segmentGroup>
            <segmentGroup neuroLexId="sao864921383" id="dend_17">
                <notes>This group contains an unbranched set of segments, and all of the segmentGroups marked with
             neuroLexId = sao864921383 form a non-overlapping set of all of the segments.
             These segmentGroups correspond to the 'cables' of NeuroML v1.8.1, and map to/from NEURON sections.</notes>
                <property tag="numberInternalDivisions" value="5"/>
                <member segment="818"/>
                <member segment="819"/>
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            </segmentGroup>
            <segmentGroup neuroLexId="sao864921383" id="dend_16">
                <notes>This group contains an unbranched set of segments, and all of the segmentGroups marked with
             neuroLexId = sao864921383 form a non-overlapping set of all of the segments.
             These segmentGroups correspond to the 'cables' of NeuroML v1.8.1, and map to/from NEURON sections.</notes>
                <property tag="numberInternalDivisions" value="5"/>
                <member segment="722"/>
                <member segment="723"/>
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            </segmentGroup>
            <segmentGroup neuroLexId="sao864921383" id="dend_14">
                <notes>This group contains an unbranched set of segments, and all of the segmentGroups marked with
             neuroLexId = sao864921383 form a non-overlapping set of all of the segments.
             These segmentGroups correspond to the 'cables' of NeuroML v1.8.1, and map to/from NEURON sections.</notes>
                <member segment="646"/>
                <member segment="647"/>
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            </segmentGroup>
            <segmentGroup neuroLexId="sao864921383" id="dend_13">
                <notes>This group contains an unbranched set of segments, and all of the segmentGroups marked with
             neuroLexId = sao864921383 form a non-overlapping set of all of the segments.
             These segmentGroups correspond to the 'cables' of NeuroML v1.8.1, and map to/from NEURON sections.</notes>
                <member segment="623"/>
                <member segment="624"/>
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            </segmentGroup>
            <segmentGroup neuroLexId="sao864921383" id="dend_9">
                <notes>This group contains an unbranched set of segments, and all of the segmentGroups marked with
             neuroLexId = sao864921383 form a non-overlapping set of all of the segments.
             These segmentGroups correspond to the 'cables' of NeuroML v1.8.1, and map to/from NEURON sections.</notes>
                <property tag="numberInternalDivisions" value="9"/>
                <member segment="374"/>
                <member segment="375"/>
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            </segmentGroup>
            <segmentGroup neuroLexId="sao864921383" id="dend_8">
                <notes>This group contains an unbranched set of segments, and all of the segmentGroups marked with
             neuroLexId = sao864921383 form a non-overlapping set of all of the segments.
             These segmentGroups correspond to the 'cables' of NeuroML v1.8.1, and map to/from NEURON sections.</notes>
                <member segment="344"/>
                <member segment="345"/>
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            </segmentGroup>
            <segmentGroup neuroLexId="sao864921383" id="dend_7">
                <notes>This group contains an unbranched set of segments, and all of the segmentGroups marked with
             neuroLexId = sao864921383 form a non-overlapping set of all of the segments.
             These segmentGroups correspond to the 'cables' of NeuroML v1.8.1, and map to/from NEURON sections.</notes>
                <member segment="326"/>
                <member segment="327"/>
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            </segmentGroup>
            <segmentGroup neuroLexId="sao864921383" id="dend_4">
                <notes>This group contains an unbranched set of segments, and all of the segmentGroups marked with
             neuroLexId = sao864921383 form a non-overlapping set of all of the segments.
             These segmentGroups correspond to the 'cables' of NeuroML v1.8.1, and map to/from NEURON sections.</notes>
                <property tag="numberInternalDivisions" value="3"/>
                <member segment="232"/>
                <member segment="233"/>
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            </segmentGroup>
            <segmentGroup neuroLexId="sao864921383" id="dend_1">
                <notes>This group contains an unbranched set of segments, and all of the segmentGroups marked with
             neuroLexId = sao864921383 form a non-overlapping set of all of the segments.
             These segmentGroups correspond to the 'cables' of NeuroML v1.8.1, and map to/from NEURON sections.</notes>
                <member segment="16"/>
                <member segment="17"/>
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            </segmentGroup>
            <segmentGroup neuroLexId="sao864921383" id="dend_11">
                <notes>This group contains an unbranched set of segments, and all of the segmentGroups marked with
             neuroLexId = sao864921383 form a non-overlapping set of all of the segments.
             These segmentGroups correspond to the 'cables' of NeuroML v1.8.1, and map to/from NEURON sections.</notes>
                <property tag="numberInternalDivisions" value="3"/>
                <member segment="553"/>
                <member segment="554"/>
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            </segmentGroup>
            <segmentGroup neuroLexId="sao864921383" id="dend_10">
                <notes>This group contains an unbranched set of segments, and all of the segmentGroups marked with
             neuroLexId = sao864921383 form a non-overlapping set of all of the segments.
             These segmentGroups correspond to the 'cables' of NeuroML v1.8.1, and map to/from NEURON sections.</notes>
                <member segment="517"/>
                <member segment="518"/>
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            </segmentGroup>
            <segmentGroup neuroLexId="sao864921383" id="dend_3">
                <notes>This group contains an unbranched set of segments, and all of the segmentGroups marked with
             neuroLexId = sao864921383 form a non-overlapping set of all of the segments.
             These segmentGroups correspond to the 'cables' of NeuroML v1.8.1, and map to/from NEURON sections.</notes>
                <property tag="numberInternalDivisions" value="7"/>
                <member segment="115"/>
                <member segment="116"/>
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            </segmentGroup>
            <segmentGroup neuroLexId="sao864921383" id="dend_2">
                <notes>This group contains an unbranched set of segments, and all of the segmentGroups marked with
             neuroLexId = sao864921383 form a non-overlapping set of all of the segments.
             These segmentGroups correspond to the 'cables' of NeuroML v1.8.1, and map to/from NEURON sections.</notes>
                <property tag="numberInternalDivisions" value="5"/>
                <member segment="26"/>
                <member segment="27"/>
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            </segmentGroup>
            <segmentGroup id="all">
                <include segmentGroup="soma_0"/>
                <include segmentGroup="axon_0"/>
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            </segmentGroup>
            <segmentGroup id="dend">
                <include segmentGroup="dend_18"/>
                <include segmentGroup="dend_15"/>
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            </segmentGroup>
            <segmentGroup id="axon">
                <include segmentGroup="axon_0"/>
                <include segmentGroup="axon_1"/>
            </segmentGroup>
            <segmentGroup id="OneSecGrp_SectionRef_30921">
                <include segmentGroup="soma_0"/>
            </segmentGroup>
            <segmentGroup id="soma_group">
                <include segmentGroup="soma"/>
            </segmentGroup>
            <segmentGroup id="axon_group">
                <include segmentGroup="axon"/>
            </segmentGroup>
            <segmentGroup id="dendrite_group">
                <include segmentGroup="dend"/>
            </segmentGroup>
        </morphology>
        <biophysicalProperties id="biophys">
            <membraneProperties>
                <channelDensity id="pas_soma" ionChannel="pas" condDensity="0.000580213 S_per_cm2" erev="-60.6708 mV" segmentGroup="soma" ion="non_specific"/>
                <channelDensity id="pas_axon" ionChannel="pas" condDensity="0.00905029 S_per_cm2" erev="-99.7369 mV" segmentGroup="axon" ion="non_specific"/>
                <channelDensity id="pas_apic" ionChannel="pas" condDensity="0.00920565 S_per_cm2" erev="-68.5246 mV" segmentGroup="apic" ion="non_specific"/>
                <channelDensity id="pas_dend" ionChannel="pas" condDensity="0.000121897 S_per_cm2" erev="-68.3689 mV" segmentGroup="dend" ion="non_specific"/>
                <channelDensity id="NaV_axon" ionChannel="NaV" condDensity="0.0479559 S_per_cm2" erev="53.0 mV" segmentGroup="axon" ion="na"/>
                <channelDensity id="K_T_axon" ionChannel="K_T" condDensity="8.64707e-05 S_per_cm2" erev="-107.0 mV" segmentGroup="axon" ion="k"/>
                <channelDensity id="Kd_axon" ionChannel="Kd" condDensity="0.00685501 S_per_cm2" erev="-107.0 mV" segmentGroup="axon" ion="k"/>
                <channelDensity id="Kv2like_axon" ionChannel="Kv2like" condDensity="0.076189 S_per_cm2" erev="-107.0 mV" segmentGroup="axon" ion="k"/>
                <channelDensity id="Kv3_1_axon" ionChannel="Kv3_1" condDensity="0.657967 S_per_cm2" erev="-107.0 mV" segmentGroup="axon" ion="k"/>
                <channelDensity id="SK_axon" ionChannel="SK" condDensity="0.00955185 S_per_cm2" erev="-107.0 mV" segmentGroup="axon" ion="k"/>
                <channelDensity id="NaV_soma" ionChannel="NaV" condDensity="0.042012 S_per_cm2" erev="53.0 mV" segmentGroup="soma" ion="na"/>
                <channelDensity id="SK_soma" ionChannel="SK" condDensity="0.00823325 S_per_cm2" erev="-107.0 mV" segmentGroup="soma" ion="k"/>
                <channelDensity id="Kv3_1_soma" ionChannel="Kv3_1" condDensity="0.795303 S_per_cm2" erev="-107.0 mV" segmentGroup="soma" ion="k"/>
                <channelDensity id="Ih_soma" ionChannel="Ih" condDensity="8.95583e-06 S_per_cm2" erev="-45 mV" segmentGroup="soma" ion="hcn"/>
                <channelDensity id="NaV_apic" ionChannel="NaV" condDensity="0.0457115 S_per_cm2" erev="53.0 mV" segmentGroup="apic" ion="na"/>
                <channelDensity id="Kv3_1_apic" ionChannel="Kv3_1" condDensity="0.816686 S_per_cm2" erev="-107.0 mV" segmentGroup="apic" ion="k"/>
                <channelDensity id="Im_v2_apic" ionChannel="Im_v2" condDensity="0.00295018 S_per_cm2" erev="-107.0 mV" segmentGroup="apic" ion="k"/>
                <channelDensity id="Ih_apic" ionChannel="Ih" condDensity="2.54654e-06 S_per_cm2" erev="-45 mV" segmentGroup="apic" ion="hcn"/>
                <channelDensity id="NaV_dend" ionChannel="NaV" condDensity="0.0494021 S_per_cm2" erev="53.0 mV" segmentGroup="dend" ion="na"/>
                <channelDensity id="Kv3_1_dend" ionChannel="Kv3_1" condDensity="0.295804 S_per_cm2" erev="-107.0 mV" segmentGroup="dend" ion="k"/>
                <channelDensity id="Im_v2_dend" ionChannel="Im_v2" condDensity="6.60277e-05 S_per_cm2" erev="-107.0 mV" segmentGroup="dend" ion="k"/>
                <channelDensity id="Ih_dend" ionChannel="Ih" condDensity="7.37124e-06 S_per_cm2" erev="-45 mV" segmentGroup="dend" ion="hcn"/>
                <channelDensityNernst id="Ca_HVA_axon" ionChannel="Ca_HVA" condDensity="1.85109e-05 S_per_cm2" segmentGroup="axon" ion="ca"/>
                <channelDensityNernst id="Ca_LVA_axon" ionChannel="Ca_LVA" condDensity="0.00417135 S_per_cm2" segmentGroup="axon" ion="ca"/>
                <channelDensityNernst id="Ca_HVA_soma" ionChannel="Ca_HVA" condDensity="4.01138e-05 S_per_cm2" segmentGroup="soma" ion="ca"/>
                <channelDensityNernst id="Ca_LVA_soma" ionChannel="Ca_LVA" condDensity="0.00508475 S_per_cm2" segmentGroup="soma" ion="ca"/>
                <specificCapacitance value="1.29443 uF_per_cm2" segmentGroup="soma"/>
                <specificCapacitance value="3.53195 uF_per_cm2" segmentGroup="axon"/>
                <specificCapacitance value="9.48186 uF_per_cm2" segmentGroup="apic"/>
                <specificCapacitance value="5.71546 uF_per_cm2" segmentGroup="dend"/>
            </membraneProperties>
            <intracellularProperties>
                <species segmentGroup="soma" id="ca" concentrationModel="CaDynamics_496538944_axon" ion="ca" initialConcentration="0.0001 mM" initialExtConcentration="2 mM"/>
                <species segmentGroup="soma" id="ca" concentrationModel="CaDynamics_496538944_soma" ion="ca" initialConcentration="0.0001 mM" initialExtConcentration="2 mM"/>
                <resistivity value="100.219 ohm_cm" segmentGroup="soma"/>
                <resistivity value="97.3256 ohm_cm" segmentGroup="axon"/>
                <resistivity value="86.9196 ohm_cm" segmentGroup="apic"/>
                <resistivity value="65.9866 ohm_cm" segmentGroup="dend"/>
            </intracellularProperties>
        </biophysicalProperties>
    </cell>
</neuroml>
