<neuroml xmlns="http://www.neuroml.org/schema/neuroml2"  xmlns:xs="http://www.w3.org/2001/XMLSchema" xmlns:xsi="http://www.w3.org/2001/XMLSchema-instance" xsi:schemaLocation="http://www.neuroml.org/schema/neuroml2 https://raw.github.com/NeuroML/NeuroML2/development/Schemas/NeuroML2/NeuroML_v2.1.xsd" id="NeuroML2_file_exported_from_NEURON">
    <include href="pas.channel.nml"/>
    <include href="NaV.channel.nml"/>
    <include href="K_T.channel.nml"/>
    <include href="Kd.channel.nml"/>
    <include href="Kv2like.channel.nml"/>
    <include href="Kv3_1.channel.nml"/>
    <include href="SK.channel.nml"/>
    <include href="Ih.channel.nml"/>
    <include href="Im_v2.channel.nml"/>
    <include href="Ca_HVA.channel.nml"/>
    <include href="Ca_LVA.channel.nml"/>
    <include href="CaDynamics_all.nml"/>
    <cell id="Cell_497233068">
        <notes>

Export of a cell model (497233068) obtained from the Allen Institute Cell Types Database into NeuroML2

Electrophysiology on which this model is based: http://celltypes.brain-map.org/mouse/experiment/electrophysiology/471085676

******************************************************
*  This export to NeuroML2 has not yet been fully validated!!
*  Use with caution!!
******************************************************

        </notes>
        <morphology id="morphology">
            <segment id="0" name="Seg0_soma_0">
                <proximal x="2.940780e+02" y="3.579580e+02" z="3.304000e+01" diameter="13.5876"/>
                <distal x="3.008720e+02" y="3.579580e+02" z="3.304000e+01" diameter="13.5876"/>
            </segment>
            <segment id="2" name="Seg1_soma_0">
                <parent segment="0"/>
                <distal x="3.076660e+02" y="3.579580e+02" z="3.304000e+01" diameter="13.5876"/>
            </segment>
            <segment id="942" name="Seg0_axon_0">
                <parent segment="0"/>
                <proximal x="3.008720e+02" y="3.579580e+02" z="3.304000e+01" diameter="1.0"/>
                <distal x="3.067130e+02" y="3.717740e+02" z="3.304000e+01" diameter="1.0"/>
            </segment>
            <segment id="943" name="Seg1_axon_0">
                <parent segment="942"/>
                <distal x="3.125550e+02" y="3.855890e+02" z="3.304000e+01" diameter="1.0"/>
            </segment>
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            <segmentGroup neuroLexId="sao864921383" id="soma_0">
                <notes>This group contains an unbranched set of segments, and all of the segmentGroups marked with
             neuroLexId = sao864921383 form a non-overlapping set of all of the segments.
             These segmentGroups correspond to the 'cables' of NeuroML v1.8.1, and map to/from NEURON sections.</notes>
                <member segment="0"/>
                <member segment="2"/>
            </segmentGroup>
            <segmentGroup neuroLexId="sao864921383" id="axon_0">
                <notes>This group contains an unbranched set of segments, and all of the segmentGroups marked with
             neuroLexId = sao864921383 form a non-overlapping set of all of the segments.
             These segmentGroups correspond to the 'cables' of NeuroML v1.8.1, and map to/from NEURON sections.</notes>
                <member segment="942"/>
                <member segment="943"/>
            </segmentGroup>
            <segmentGroup neuroLexId="sao864921383" id="dend_14">
                <notes>This group contains an unbranched set of segments, and all of the segmentGroups marked with
             neuroLexId = sao864921383 form a non-overlapping set of all of the segments.
             These segmentGroups correspond to the 'cables' of NeuroML v1.8.1, and map to/from NEURON sections.</notes>
                <property tag="numberInternalDivisions" value="3"/>
                <member segment="683"/>
                <member segment="684"/>
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            </segmentGroup>
            <segmentGroup neuroLexId="sao864921383" id="dend_13">
                <notes>This group contains an unbranched set of segments, and all of the segmentGroups marked with
             neuroLexId = sao864921383 form a non-overlapping set of all of the segments.
             These segmentGroups correspond to the 'cables' of NeuroML v1.8.1, and map to/from NEURON sections.</notes>
                <property tag="numberInternalDivisions" value="3"/>
                <member segment="629"/>
                <member segment="630"/>
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            </segmentGroup>
            <segmentGroup neuroLexId="sao864921383" id="dend_12">
                <notes>This group contains an unbranched set of segments, and all of the segmentGroups marked with
             neuroLexId = sao864921383 form a non-overlapping set of all of the segments.
             These segmentGroups correspond to the 'cables' of NeuroML v1.8.1, and map to/from NEURON sections.</notes>
                <property tag="numberInternalDivisions" value="3"/>
                <member segment="568"/>
                <member segment="569"/>
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            </segmentGroup>
            <segmentGroup neuroLexId="sao864921383" id="dend_11">
                <notes>This group contains an unbranched set of segments, and all of the segmentGroups marked with
             neuroLexId = sao864921383 form a non-overlapping set of all of the segments.
             These segmentGroups correspond to the 'cables' of NeuroML v1.8.1, and map to/from NEURON sections.</notes>
                <property tag="numberInternalDivisions" value="3"/>
                <member segment="529"/>
                <member segment="530"/>
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            </segmentGroup>
            <segmentGroup neuroLexId="sao864921383" id="dend_8">
                <notes>This group contains an unbranched set of segments, and all of the segmentGroups marked with
             neuroLexId = sao864921383 form a non-overlapping set of all of the segments.
             These segmentGroups correspond to the 'cables' of NeuroML v1.8.1, and map to/from NEURON sections.</notes>
                <member segment="399"/>
                <member segment="400"/>
                <member segment="401"/>
            </segmentGroup>
            <segmentGroup neuroLexId="sao864921383" id="dend_7">
                <notes>This group contains an unbranched set of segments, and all of the segmentGroups marked with
             neuroLexId = sao864921383 form a non-overlapping set of all of the segments.
             These segmentGroups correspond to the 'cables' of NeuroML v1.8.1, and map to/from NEURON sections.</notes>
                <property tag="numberInternalDivisions" value="3"/>
                <member segment="335"/>
                <member segment="336"/>
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            </segmentGroup>
            <segmentGroup neuroLexId="sao864921383" id="dend_0">
                <notes>This group contains an unbranched set of segments, and all of the segmentGroups marked with
             neuroLexId = sao864921383 form a non-overlapping set of all of the segments.
             These segmentGroups correspond to the 'cables' of NeuroML v1.8.1, and map to/from NEURON sections.</notes>
                <member segment="3"/>
                <member segment="4"/>
            </segmentGroup>
            <segmentGroup neuroLexId="sao864921383" id="axon_1">
                <notes>This group contains an unbranched set of segments, and all of the segmentGroups marked with
             neuroLexId = sao864921383 form a non-overlapping set of all of the segments.
             These segmentGroups correspond to the 'cables' of NeuroML v1.8.1, and map to/from NEURON sections.</notes>
                <member segment="944"/>
                <member segment="945"/>
            </segmentGroup>
            <segmentGroup neuroLexId="sao864921383" id="dend_18">
                <notes>This group contains an unbranched set of segments, and all of the segmentGroups marked with
             neuroLexId = sao864921383 form a non-overlapping set of all of the segments.
             These segmentGroups correspond to the 'cables' of NeuroML v1.8.1, and map to/from NEURON sections.</notes>
                <property tag="numberInternalDivisions" value="3"/>
                <member segment="898"/>
                <member segment="899"/>
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            </segmentGroup>
            <segmentGroup neuroLexId="sao864921383" id="dend_15">
                <notes>This group contains an unbranched set of segments, and all of the segmentGroups marked with
             neuroLexId = sao864921383 form a non-overlapping set of all of the segments.
             These segmentGroups correspond to the 'cables' of NeuroML v1.8.1, and map to/from NEURON sections.</notes>
                <member segment="731"/>
            </segmentGroup>
            <segmentGroup neuroLexId="sao864921383" id="dend_10">
                <notes>This group contains an unbranched set of segments, and all of the segmentGroups marked with
             neuroLexId = sao864921383 form a non-overlapping set of all of the segments.
             These segmentGroups correspond to the 'cables' of NeuroML v1.8.1, and map to/from NEURON sections.</notes>
                <member segment="516"/>
                <member segment="517"/>
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            </segmentGroup>
            <segmentGroup neuroLexId="sao864921383" id="dend_9">
                <notes>This group contains an unbranched set of segments, and all of the segmentGroups marked with
             neuroLexId = sao864921383 form a non-overlapping set of all of the segments.
             These segmentGroups correspond to the 'cables' of NeuroML v1.8.1, and map to/from NEURON sections.</notes>
                <property tag="numberInternalDivisions" value="7"/>
                <member segment="402"/>
                <member segment="403"/>
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            </segmentGroup>
            <segmentGroup neuroLexId="sao864921383" id="dend_2">
                <notes>This group contains an unbranched set of segments, and all of the segmentGroups marked with
             neuroLexId = sao864921383 form a non-overlapping set of all of the segments.
             These segmentGroups correspond to the 'cables' of NeuroML v1.8.1, and map to/from NEURON sections.</notes>
                <member segment="71"/>
                <member segment="72"/>
                <member segment="73"/>
            </segmentGroup>
            <segmentGroup neuroLexId="sao864921383" id="dend_1">
                <notes>This group contains an unbranched set of segments, and all of the segmentGroups marked with
             neuroLexId = sao864921383 form a non-overlapping set of all of the segments.
             These segmentGroups correspond to the 'cables' of NeuroML v1.8.1, and map to/from NEURON sections.</notes>
                <property tag="numberInternalDivisions" value="5"/>
                <member segment="5"/>
                <member segment="6"/>
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            </segmentGroup>
            <segmentGroup neuroLexId="sao864921383" id="dend_17">
                <notes>This group contains an unbranched set of segments, and all of the segmentGroups marked with
             neuroLexId = sao864921383 form a non-overlapping set of all of the segments.
             These segmentGroups correspond to the 'cables' of NeuroML v1.8.1, and map to/from NEURON sections.</notes>
                <property tag="numberInternalDivisions" value="7"/>
                <member segment="790"/>
                <member segment="791"/>
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            </segmentGroup>
            <segmentGroup neuroLexId="sao864921383" id="dend_16">
                <notes>This group contains an unbranched set of segments, and all of the segmentGroups marked with
             neuroLexId = sao864921383 form a non-overlapping set of all of the segments.
             These segmentGroups correspond to the 'cables' of NeuroML v1.8.1, and map to/from NEURON sections.</notes>
                <property tag="numberInternalDivisions" value="3"/>
                <member segment="732"/>
                <member segment="733"/>
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            </segmentGroup>
            <segmentGroup neuroLexId="sao864921383" id="dend_4">
                <notes>This group contains an unbranched set of segments, and all of the segmentGroups marked with
             neuroLexId = sao864921383 form a non-overlapping set of all of the segments.
             These segmentGroups correspond to the 'cables' of NeuroML v1.8.1, and map to/from NEURON sections.</notes>
                <member segment="123"/>
                <member segment="124"/>
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            </segmentGroup>
            <segmentGroup neuroLexId="sao864921383" id="dend_3">
                <notes>This group contains an unbranched set of segments, and all of the segmentGroups marked with
             neuroLexId = sao864921383 form a non-overlapping set of all of the segments.
             These segmentGroups correspond to the 'cables' of NeuroML v1.8.1, and map to/from NEURON sections.</notes>
                <property tag="numberInternalDivisions" value="3"/>
                <member segment="74"/>
                <member segment="75"/>
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            </segmentGroup>
            <segmentGroup neuroLexId="sao864921383" id="dend_6">
                <notes>This group contains an unbranched set of segments, and all of the segmentGroups marked with
             neuroLexId = sao864921383 form a non-overlapping set of all of the segments.
             These segmentGroups correspond to the 'cables' of NeuroML v1.8.1, and map to/from NEURON sections.</notes>
                <member segment="312"/>
                <member segment="313"/>
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            </segmentGroup>
            <segmentGroup neuroLexId="sao864921383" id="dend_5">
                <notes>This group contains an unbranched set of segments, and all of the segmentGroups marked with
             neuroLexId = sao864921383 form a non-overlapping set of all of the segments.
             These segmentGroups correspond to the 'cables' of NeuroML v1.8.1, and map to/from NEURON sections.</notes>
                <property tag="numberInternalDivisions" value="11"/>
                <member segment="136"/>
                <member segment="137"/>
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            </segmentGroup>
            <segmentGroup id="all">
                <include segmentGroup="soma_0"/>
                <include segmentGroup="axon_0"/>
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            </segmentGroup>
            <segmentGroup id="dend">
                <include segmentGroup="dend_14"/>
                <include segmentGroup="dend_13"/>
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            </segmentGroup>
            <segmentGroup id="axon">
                <include segmentGroup="axon_0"/>
                <include segmentGroup="axon_1"/>
            </segmentGroup>
            <segmentGroup id="OneSecGrp_SectionRef_28097">
                <include segmentGroup="soma_0"/>
            </segmentGroup>
            <segmentGroup id="soma_group">
                <include segmentGroup="soma"/>
            </segmentGroup>
            <segmentGroup id="axon_group">
                <include segmentGroup="axon"/>
            </segmentGroup>
            <segmentGroup id="dendrite_group">
                <include segmentGroup="dend"/>
            </segmentGroup>
        </morphology>
        <biophysicalProperties id="biophys">
            <membraneProperties>
                <channelDensity id="pas_soma" ionChannel="pas" condDensity="0.00200938 S_per_cm2" erev="-74.246 mV" segmentGroup="soma" ion="non_specific"/>
                <channelDensity id="pas_axon" ionChannel="pas" condDensity="0.00856426 S_per_cm2" erev="-104.894 mV" segmentGroup="axon" ion="non_specific"/>
                <channelDensity id="pas_apic" ionChannel="pas" condDensity="0.0090166 S_per_cm2" erev="-77.4947 mV" segmentGroup="apic" ion="non_specific"/>
                <channelDensity id="pas_dend" ionChannel="pas" condDensity="1.65286e-05 S_per_cm2" erev="-67.9418 mV" segmentGroup="dend" ion="non_specific"/>
                <channelDensity id="NaV_axon" ionChannel="NaV" condDensity="0.00545856 S_per_cm2" erev="53.0 mV" segmentGroup="axon" ion="na"/>
                <channelDensity id="K_T_axon" ionChannel="K_T" condDensity="0.000378237 S_per_cm2" erev="-107.0 mV" segmentGroup="axon" ion="k"/>
                <channelDensity id="Kd_axon" ionChannel="Kd" condDensity="0.0033881 S_per_cm2" erev="-107.0 mV" segmentGroup="axon" ion="k"/>
                <channelDensity id="Kv2like_axon" ionChannel="Kv2like" condDensity="0.0889189 S_per_cm2" erev="-107.0 mV" segmentGroup="axon" ion="k"/>
                <channelDensity id="Kv3_1_axon" ionChannel="Kv3_1" condDensity="0.887401 S_per_cm2" erev="-107.0 mV" segmentGroup="axon" ion="k"/>
                <channelDensity id="SK_axon" ionChannel="SK" condDensity="0.00852693 S_per_cm2" erev="-107.0 mV" segmentGroup="axon" ion="k"/>
                <channelDensity id="NaV_soma" ionChannel="NaV" condDensity="0.0300709 S_per_cm2" erev="53.0 mV" segmentGroup="soma" ion="na"/>
                <channelDensity id="SK_soma" ionChannel="SK" condDensity="0.00018363 S_per_cm2" erev="-107.0 mV" segmentGroup="soma" ion="k"/>
                <channelDensity id="Kv3_1_soma" ionChannel="Kv3_1" condDensity="0.9339 S_per_cm2" erev="-107.0 mV" segmentGroup="soma" ion="k"/>
                <channelDensity id="Ih_soma" ionChannel="Ih" condDensity="6.00279e-07 S_per_cm2" erev="-45 mV" segmentGroup="soma" ion="hcn"/>
                <channelDensity id="NaV_apic" ionChannel="NaV" condDensity="0.0169086 S_per_cm2" erev="53.0 mV" segmentGroup="apic" ion="na"/>
                <channelDensity id="Kv3_1_apic" ionChannel="Kv3_1" condDensity="0.989565 S_per_cm2" erev="-107.0 mV" segmentGroup="apic" ion="k"/>
                <channelDensity id="Im_v2_apic" ionChannel="Im_v2" condDensity="0.00621845 S_per_cm2" erev="-107.0 mV" segmentGroup="apic" ion="k"/>
                <channelDensity id="Ih_apic" ionChannel="Ih" condDensity="9.81545e-06 S_per_cm2" erev="-45 mV" segmentGroup="apic" ion="hcn"/>
                <channelDensity id="NaV_dend" ionChannel="NaV" condDensity="0.0497473 S_per_cm2" erev="53.0 mV" segmentGroup="dend" ion="na"/>
                <channelDensity id="Kv3_1_dend" ionChannel="Kv3_1" condDensity="0.999861 S_per_cm2" erev="-107.0 mV" segmentGroup="dend" ion="k"/>
                <channelDensity id="Im_v2_dend" ionChannel="Im_v2" condDensity="0.000140809 S_per_cm2" erev="-107.0 mV" segmentGroup="dend" ion="k"/>
                <channelDensity id="Ih_dend" ionChannel="Ih" condDensity="2.00372e-06 S_per_cm2" erev="-45 mV" segmentGroup="dend" ion="hcn"/>
                <channelDensityNernst id="Ca_HVA_axon" ionChannel="Ca_HVA" condDensity="2.66551e-05 S_per_cm2" segmentGroup="axon" ion="ca"/>
                <channelDensityNernst id="Ca_LVA_axon" ionChannel="Ca_LVA" condDensity="0.00865159 S_per_cm2" segmentGroup="axon" ion="ca"/>
                <channelDensityNernst id="Ca_HVA_soma" ionChannel="Ca_HVA" condDensity="2.23514e-06 S_per_cm2" segmentGroup="soma" ion="ca"/>
                <channelDensityNernst id="Ca_LVA_soma" ionChannel="Ca_LVA" condDensity="0.00728668 S_per_cm2" segmentGroup="soma" ion="ca"/>
                <specificCapacitance value="0.517341 uF_per_cm2" segmentGroup="soma"/>
                <specificCapacitance value="1.85342 uF_per_cm2" segmentGroup="axon"/>
                <specificCapacitance value="4.00329 uF_per_cm2" segmentGroup="apic"/>
                <specificCapacitance value="4.4378 uF_per_cm2" segmentGroup="dend"/>
            </membraneProperties>
            <intracellularProperties>
                <species segmentGroup="soma" id="ca" concentrationModel="CaDynamics_497233068_axon" ion="ca" initialConcentration="0.0001 mM" initialExtConcentration="2 mM"/>
                <species segmentGroup="soma" id="ca" concentrationModel="CaDynamics_497233068_soma" ion="ca" initialConcentration="0.0001 mM" initialExtConcentration="2 mM"/>
                <resistivity value="139.083 ohm_cm" segmentGroup="soma"/>
                <resistivity value="138.183 ohm_cm" segmentGroup="axon"/>
                <resistivity value="90.8828 ohm_cm" segmentGroup="apic"/>
                <resistivity value="51.4091 ohm_cm" segmentGroup="dend"/>
            </intracellularProperties>
        </biophysicalProperties>
    </cell>
</neuroml>
