<neuroml xmlns="http://www.neuroml.org/schema/neuroml2"  xmlns:xs="http://www.w3.org/2001/XMLSchema" xmlns:xsi="http://www.w3.org/2001/XMLSchema-instance" xsi:schemaLocation="http://www.neuroml.org/schema/neuroml2 https://raw.github.com/NeuroML/NeuroML2/development/Schemas/NeuroML2/NeuroML_v2.1.xsd" id="NeuroML2_file_exported_from_NEURON">
    <include href="pas.channel.nml"/>
    <include href="NaV.channel.nml"/>
    <include href="K_T.channel.nml"/>
    <include href="Kd.channel.nml"/>
    <include href="Kv2like.channel.nml"/>
    <include href="Kv3_1.channel.nml"/>
    <include href="SK.channel.nml"/>
    <include href="Ih.channel.nml"/>
    <include href="Im_v2.channel.nml"/>
    <include href="Ca_HVA.channel.nml"/>
    <include href="Ca_LVA.channel.nml"/>
    <include href="CaDynamics_all.nml"/>
    <cell id="Cell_515175260">
        <notes>

Export of a cell model (515175260) obtained from the Allen Institute Cell Types Database into NeuroML2

Electrophysiology on which this model is based: http://celltypes.brain-map.org/mouse/experiment/electrophysiology/515175260

******************************************************
*  This export to NeuroML2 has not yet been fully validated!!
*  Use with caution!!
******************************************************

        </notes>
        <morphology id="morphology">
            <segment id="0" name="Seg0_soma_0">
                <proximal x="4.916870e+02" y="6.700410e+02" z="3.304000e+01" diameter="10.0756"/>
                <distal x="4.967250e+02" y="6.700410e+02" z="3.304000e+01" diameter="10.0756"/>
            </segment>
            <segment id="2" name="Seg1_soma_0">
                <parent segment="0"/>
                <distal x="5.017630e+02" y="6.700410e+02" z="3.304000e+01" diameter="10.0756"/>
            </segment>
            <segment id="3885" name="Seg0_axon_0">
                <parent segment="0"/>
                <proximal x="4.967250e+02" y="6.700410e+02" z="3.304000e+01" diameter="1.0"/>
                <distal x="5.025660e+02" y="6.838570e+02" z="3.304000e+01" diameter="1.0"/>
            </segment>
            <segment id="3886" name="Seg1_axon_0">
                <parent segment="3885"/>
                <distal x="5.084070e+02" y="6.976730e+02" z="3.304000e+01" diameter="1.0"/>
            </segment>
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            <segmentGroup neuroLexId="sao864921383" id="soma_0">
                <notes>This group contains an unbranched set of segments, and all of the segmentGroups marked with
             neuroLexId = sao864921383 form a non-overlapping set of all of the segments.
             These segmentGroups correspond to the 'cables' of NeuroML v1.8.1, and map to/from NEURON sections.</notes>
                <member segment="0"/>
                <member segment="2"/>
            </segmentGroup>
            <segmentGroup neuroLexId="sao864921383" id="axon_0">
                <notes>This group contains an unbranched set of segments, and all of the segmentGroups marked with
             neuroLexId = sao864921383 form a non-overlapping set of all of the segments.
             These segmentGroups correspond to the 'cables' of NeuroML v1.8.1, and map to/from NEURON sections.</notes>
                <member segment="3885"/>
                <member segment="3886"/>
            </segmentGroup>
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            <segmentGroup id="dend">
                <include segmentGroup="dend_42"/>
                <include segmentGroup="dend_35"/>
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            </segmentGroup>
            <segmentGroup id="axon">
                <include segmentGroup="axon_0"/>
                <include segmentGroup="axon_1"/>
            </segmentGroup>
            <segmentGroup id="apic">
                <include segmentGroup="apic_0"/>
                <include segmentGroup="apic_54"/>
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            </segmentGroup>
            <segmentGroup id="OneSecGrp_SectionRef_15001">
                <include segmentGroup="soma_0"/>
            </segmentGroup>
            <segmentGroup id="soma_group">
                <include segmentGroup="soma"/>
            </segmentGroup>
            <segmentGroup id="axon_group">
                <include segmentGroup="axon"/>
            </segmentGroup>
            <segmentGroup id="dendrite_group">
                <include segmentGroup="dend"/>
            </segmentGroup>
        </morphology>
        <biophysicalProperties id="biophys">
            <membraneProperties>
                <channelDensity id="pas_soma" ionChannel="pas" condDensity="0.000103795 S_per_cm2" erev="-65.0383 mV" segmentGroup="soma" ion="non_specific"/>
                <channelDensity id="pas_axon" ionChannel="pas" condDensity="0.00843745 S_per_cm2" erev="-86.8037 mV" segmentGroup="axon" ion="non_specific"/>
                <channelDensity id="pas_apic" ionChannel="pas" condDensity="7.35953e-05 S_per_cm2" erev="-77.6234 mV" segmentGroup="apic" ion="non_specific"/>
                <channelDensity id="pas_dend" ionChannel="pas" condDensity="7.4728e-05 S_per_cm2" erev="-64.7262 mV" segmentGroup="dend" ion="non_specific"/>
                <channelDensity id="NaV_axon" ionChannel="NaV" condDensity="0.0191585 S_per_cm2" erev="53.0 mV" segmentGroup="axon" ion="na"/>
                <channelDensity id="K_T_axon" ionChannel="K_T" condDensity="0.000342128 S_per_cm2" erev="-107.0 mV" segmentGroup="axon" ion="k"/>
                <channelDensity id="Kd_axon" ionChannel="Kd" condDensity="0.00662534 S_per_cm2" erev="-107.0 mV" segmentGroup="axon" ion="k"/>
                <channelDensity id="Kv2like_axon" ionChannel="Kv2like" condDensity="0.0781335 S_per_cm2" erev="-107.0 mV" segmentGroup="axon" ion="k"/>
                <channelDensity id="Kv3_1_axon" ionChannel="Kv3_1" condDensity="0.319499 S_per_cm2" erev="-107.0 mV" segmentGroup="axon" ion="k"/>
                <channelDensity id="SK_axon" ionChannel="SK" condDensity="0.000307168 S_per_cm2" erev="-107.0 mV" segmentGroup="axon" ion="k"/>
                <channelDensity id="NaV_soma" ionChannel="NaV" condDensity="0.0492522 S_per_cm2" erev="53.0 mV" segmentGroup="soma" ion="na"/>
                <channelDensity id="SK_soma" ionChannel="SK" condDensity="0.000471867 S_per_cm2" erev="-107.0 mV" segmentGroup="soma" ion="k"/>
                <channelDensity id="Kv3_1_soma" ionChannel="Kv3_1" condDensity="0.0245581 S_per_cm2" erev="-107.0 mV" segmentGroup="soma" ion="k"/>
                <channelDensity id="Ih_soma" ionChannel="Ih" condDensity="1.81504e-06 S_per_cm2" erev="-45 mV" segmentGroup="soma" ion="hcn"/>
                <channelDensity id="NaV_apic" ionChannel="NaV" condDensity="0.0237654 S_per_cm2" erev="53.0 mV" segmentGroup="apic" ion="na"/>
                <channelDensity id="Kv3_1_apic" ionChannel="Kv3_1" condDensity="0.752353 S_per_cm2" erev="-107.0 mV" segmentGroup="apic" ion="k"/>
                <channelDensity id="Im_v2_apic" ionChannel="Im_v2" condDensity="0.00598847 S_per_cm2" erev="-107.0 mV" segmentGroup="apic" ion="k"/>
                <channelDensity id="Ih_apic" ionChannel="Ih" condDensity="4.92259e-07 S_per_cm2" erev="-45 mV" segmentGroup="apic" ion="hcn"/>
                <channelDensity id="NaV_dend" ionChannel="NaV" condDensity="0.0489385 S_per_cm2" erev="53.0 mV" segmentGroup="dend" ion="na"/>
                <channelDensity id="Kv3_1_dend" ionChannel="Kv3_1" condDensity="0.00293548 S_per_cm2" erev="-107.0 mV" segmentGroup="dend" ion="k"/>
                <channelDensity id="Im_v2_dend" ionChannel="Im_v2" condDensity="0.00046671 S_per_cm2" erev="-107.0 mV" segmentGroup="dend" ion="k"/>
                <channelDensity id="Ih_dend" ionChannel="Ih" condDensity="5.55742e-07 S_per_cm2" erev="-45 mV" segmentGroup="dend" ion="hcn"/>
                <channelDensityNernst id="Ca_HVA_axon" ionChannel="Ca_HVA" condDensity="2.8064e-05 S_per_cm2" segmentGroup="axon" ion="ca"/>
                <channelDensityNernst id="Ca_LVA_axon" ionChannel="Ca_LVA" condDensity="0.00292217 S_per_cm2" segmentGroup="axon" ion="ca"/>
                <channelDensityNernst id="Ca_HVA_soma" ionChannel="Ca_HVA" condDensity="2.52505e-05 S_per_cm2" segmentGroup="soma" ion="ca"/>
                <channelDensityNernst id="Ca_LVA_soma" ionChannel="Ca_LVA" condDensity="0.00349065 S_per_cm2" segmentGroup="soma" ion="ca"/>
                <specificCapacitance value="0.675393 uF_per_cm2" segmentGroup="soma"/>
                <specificCapacitance value="0.563965 uF_per_cm2" segmentGroup="axon"/>
                <specificCapacitance value="7.39102 uF_per_cm2" segmentGroup="apic"/>
                <specificCapacitance value="0.516326 uF_per_cm2" segmentGroup="dend"/>
            </membraneProperties>
            <intracellularProperties>
                <species segmentGroup="soma" id="ca" concentrationModel="CaDynamics_515175260_axon" ion="ca" initialConcentration="0.0001 mM" initialExtConcentration="2 mM"/>
                <species segmentGroup="soma" id="ca" concentrationModel="CaDynamics_515175260_soma" ion="ca" initialConcentration="0.0001 mM" initialExtConcentration="2 mM"/>
                <resistivity value="62.1714 ohm_cm" segmentGroup="soma"/>
                <resistivity value="93.3598 ohm_cm" segmentGroup="axon"/>
                <resistivity value="148.962 ohm_cm" segmentGroup="apic"/>
                <resistivity value="70.5037 ohm_cm" segmentGroup="dend"/>
            </intracellularProperties>
        </biophysicalProperties>
    </cell>
</neuroml>
