<Lems>

    <!--

        This LEMS file has been automatically generated using PyNeuroML v0.5.7 (libNeuroML v0.2.53)

     -->

    <!-- Specify which component to run -->
    <Target component="480630395"/>

    <!-- Include core NeuroML2 ComponentType definitions -->
    <Include file="Cells.xml"/>
    <Include file="Networks.xml"/>
    <Include file="Simulation.xml"/>

    <Include file="Network_480630395.net.nml"/>
    <Include file="Cell_480630395.cell.nml"/>
    <Include file="Im.channel.nml"/>
    <Include file="Ih.channel.nml"/>
    <Include file="NaTs.channel.nml"/>
    <Include file="Nap.channel.nml"/>
    <Include file="K_P.channel.nml"/>
    <Include file="K_T.channel.nml"/>
    <Include file="SK.channel.nml"/>
    <Include file="Kv3_1.channel.nml"/>
    <Include file="pas.channel.nml"/>
    <Include file="Ca_HVA.channel.nml"/>
    <Include file="Ca_LVA.channel.nml"/>
    <Include file="CaDynamics_all.nml"/>
    <Include file="CaDynamics.nml"/>

    <Simulation id="480630395" length="2500ms" step="0.005ms" target="network" seed="12345">  <!-- Note seed: ensures same random numbers used every run -->

        <Display id="DispPop__Pop_Cell_480630395" title="Membrane potentials of cells in Pop_Cell_480630395" timeScale="1ms" xmin="-250.0" xmax="2750.0" ymin="-90" ymax="50">
            <Line id="Pop_Cell_480630395[0]: v" quantity="Pop_Cell_480630395/0/Cell_480630395/v" scale="1mV" color="#e1a7b4" timeScale="1ms"/>
        </Display>

        <OutputFile id="Volts_file__Pop_Cell_480630395" fileName="480630395.Pop_Cell_480630395.v.dat">
            <OutputColumn id="v_Pop_Cell_480630395_0_Cell_480630395_v" quantity="Pop_Cell_480630395/0/Cell_480630395/v"/>
        </OutputFile>

    </Simulation>

</Lems>
