<Lems>

    <!--

        This LEMS file has been automatically generated using PyNeuroML v0.5.7 (libNeuroML v0.2.53)

     -->

    <!-- Specify which component to run -->
    <Target component="497233307"/>

    <!-- Include core NeuroML2 ComponentType definitions -->
    <Include file="Cells.xml"/>
    <Include file="Networks.xml"/>
    <Include file="Simulation.xml"/>

    <Include file="Network_497233307.net.nml"/>
    <Include file="Cell_497233307.cell.nml"/>
    <Include file="pas.channel.nml"/>
    <Include file="NaV.channel.nml"/>
    <Include file="K_T.channel.nml"/>
    <Include file="Kd.channel.nml"/>
    <Include file="Kv2like.channel.nml"/>
    <Include file="Kv3_1.channel.nml"/>
    <Include file="SK.channel.nml"/>
    <Include file="Ih.channel.nml"/>
    <Include file="Im_v2.channel.nml"/>
    <Include file="Ca_HVA.channel.nml"/>
    <Include file="Ca_LVA.channel.nml"/>
    <Include file="CaDynamics_all.nml"/>
    <Include file="CaDynamics.nml"/>

    <Simulation id="497233307" length="2500ms" step="0.005ms" target="network" seed="12345">  <!-- Note seed: ensures same random numbers used every run -->

        <Display id="DispPop__Pop_Cell_497233307" title="Membrane potentials of cells in Pop_Cell_497233307" timeScale="1ms" xmin="-250.0" xmax="2750.0" ymin="-90" ymax="50">
            <Line id="Pop_Cell_497233307[0]: v" quantity="Pop_Cell_497233307/0/Cell_497233307/v" scale="1mV" color="#e1a7b4" timeScale="1ms"/>
        </Display>

        <OutputFile id="Volts_file__Pop_Cell_497233307" fileName="497233307.Pop_Cell_497233307.v.dat">
            <OutputColumn id="v_Pop_Cell_497233307_0_Cell_497233307_v" quantity="Pop_Cell_497233307/0/Cell_497233307/v"/>
        </OutputFile>

    </Simulation>

</Lems>
