<Lems>

    <!--

        This LEMS file has been automatically generated using PyNeuroML v0.5.7 (libNeuroML v0.2.53)

     -->

    <!-- Specify which component to run -->
    <Target component="501349527"/>

    <!-- Include core NeuroML2 ComponentType definitions -->
    <Include file="Cells.xml"/>
    <Include file="Networks.xml"/>
    <Include file="Simulation.xml"/>

    <Include file="Network_501349527.net.nml"/>
    <Include file="Cell_501349527.cell.nml"/>
    <Include file="pas.channel.nml"/>
    <Include file="NaV.channel.nml"/>
    <Include file="K_T.channel.nml"/>
    <Include file="Kd.channel.nml"/>
    <Include file="Kv2like.channel.nml"/>
    <Include file="Kv3_1.channel.nml"/>
    <Include file="SK.channel.nml"/>
    <Include file="Ih.channel.nml"/>
    <Include file="Im_v2.channel.nml"/>
    <Include file="Ca_HVA.channel.nml"/>
    <Include file="Ca_LVA.channel.nml"/>
    <Include file="CaDynamics_all.nml"/>
    <Include file="CaDynamics.nml"/>
    <Include file="Cell1.cell.nml"/>

    <Simulation id="501349527" length="2500ms" step="0.005ms" target="network" seed="12345">  <!-- Note seed: ensures same random numbers used every run -->

        <Display id="DispPop__Pop_Cell_501349527" title="Membrane potentials of cells in Pop_Cell_501349527" timeScale="1ms" xmin="-250.0" xmax="2750.0" ymin="-90" ymax="50">
            <Line id="Pop_Cell_501349527[0]: v" quantity="Pop_Cell_501349527/0/Cell_501349527/v" scale="1mV" color="#e1a7b4" timeScale="1ms"/>
        </Display>

        <Display id="DispPop__Pop_Cell1" title="Membrane potentials of cells in Pop_Cell1" timeScale="1ms" xmin="-250.0" xmax="2750.0" ymin="-90" ymax="50">
            <Line id="Pop_Cell1[0]: v" quantity="Pop_Cell1/0/Cell1/v" scale="1mV" color="#3bd3d4" timeScale="1ms"/>
        </Display>

        <OutputFile id="Volts_file__Pop_Cell_501349527" fileName="501349527.Pop_Cell_501349527.v.dat">
            <OutputColumn id="v_Pop_Cell_501349527_0_Cell_501349527_v" quantity="Pop_Cell_501349527/0/Cell_501349527/v"/>
        </OutputFile>

        <OutputFile id="Volts_file__Pop_Cell1" fileName="501349527.Pop_Cell1.v.dat">
            <OutputColumn id="v_Pop_Cell1_0_Cell1_v" quantity="Pop_Cell1/0/Cell1/v"/>
        </OutputFile>

    </Simulation>

</Lems>
